*Heading
** Job name: SingleCrack Model name: Model-1
** Generated by: Abaqus/CAE 6.14-1
*Preprint, echo=NO, model=NO, history=NO, contact=NO
**
** PARTS
**
*Part, name=Part-1
*Node
      1,          0.5, -0.0700000003
      2, -0.0698750019, -0.0700000003
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***************************************************************
*User element, nodes=3, type=U1, properties=5, coordinates=2, VARIABLES=9
1,2
*********************** TRIANGULAR ****************************
*User element, nodes=3, type=U5, properties=4, coordinates=2, VARIABLES=6
4
***************************************************************
***************************************************************
*User element, nodes=4, type=U2, properties=5, coordinates=2, VARIABLES=12
1,2
*********************** RECTENGULAR ****************************
*User element, nodes=4, type=U6, properties=4, coordinates=2, VARIABLES=8
4
***************************************************************
***************************************************************
*Element, type=U1
1, 1833, 1803, 993
2, 1615, 1594, 999
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***************************************************************
*Element, type=U5
15582, 1833, 1803, 993
15583, 1615, 1594, 999
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***************************************************************
*Element, type=U2
34, 20, 1208, 1226, 19
35, 1942, 1223, 1218, 1239
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***************************************************************
*Element, type=U6
15615, 20, 1208, 1226, 19
15616, 1942, 1223, 1218, 1239
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***************************************************************
********************** ASSIGNING MATERIAL PROP ****************
*Elset, elset=Set-1, generate
     1,  15581,      1
***************************************************************
*Uel property, elset=Set-1
210000, 0.3, 0, 0.0075, 2.7
**E, nu, at, lc, gc
***************************************************************
*Elset, elset=Set-1_PH, generate
15582, 31162, 1
***************************************************************
*Uel property, elset=Set-1_PH
210000, 0, 0.0075, 2.7
**E, at, lc, gc
***************************************************************
*Element, type=CPE3
31163, 1833, 1803, 993
31164, 1615, 1594, 999
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***************************************************************
*Element, type=CPE4
31196, 20, 1208, 1226, 19
31197, 1942, 1223, 1218, 1239
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***************************************************************
*Elset, elset=umatelem, generate
31163, 46743, 1
***************************************************************
*Solid Section, elset=umatelem, material=Material-1
1.0
*End Part
**
**
** ASSEMBLY
**
*Assembly, name=Assembly
**
*Instance, name=Part-1-1, part=Part-1
*End Instance
**
*Node
      1,           0.,  0.550000012,           0.
*Nset, nset=BTM, instance=Part-1-1
   5,   6, 111, 112, 113, 114
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*Elset, elset=BTM, instance=Part-1-1
   67,   68,  112,  120,  125,  131
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*Nset, nset=BTM_L, instance=Part-1-1
 5,
*Nset, nset=BTM_R, instance=Part-1-1
 6,
*Nset, nset=RP
 1,
*Nset, nset=TOP, instance=Part-1-1
  14,  15, 817, 818, 819, 820
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*Elset, elset=TOP, instance=Part-1-1
 7858, 7859, 7860, 7882, 7883, 7884
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** Constraint: Constraint-1
*Equation
2
TOP, 2, 1.
RP, 2, -1.
**
*Elset, elset=umatelem, instance=Part-1-1, generate
31163, 46743, 1
**
*End Assembly
***************************************************************
**
** MATERIALS
**
*Material, name=Material-1
*Depvar
      5,
*User Material, constants=1
0.,
** ----------------------------------------------------------------
**
** STEP: Step-1
**
*Step, name=Step-1, nlgeom=NO, inc=1500
*Static
0.01, 1., 1e-09, 0.01
**
** BOUNDARY CONDITIONS
**
** Name: BTM_FIX Type: Displacement/Rotation
*Boundary
BTM, 1, 1
BTM, 2, 2
** Name: LOAD Type: Displacement/Rotation
*Boundary
RP, 1, 1
RP, 2, 2, 0.008
**
** CONTROLS
**
*Controls, reset
*Controls, parameters=time incrementation
, , , , , 5, , 10, , ,
**Controls, parameters=line search
**5, , , ,
**
** OUTPUT REQUESTS
**
*Restart, write, frequency=0
**
** FIELD OUTPUT: F-Output-1
**
*Output, field
*Node Output
RF, U
*Element Output, directions=YES
SDV,
**
** HISTORY OUTPUT: H-Output-1
**
*element output, elset=umatelem
SDV
**
*End Step
